# OpenSim document version 40000
# New .osim file
# Automatically generated using calcman.
Model dpendulum:
  gravity: 0 -9.0865 0
  length_units: meters
  force_units: N
  Ground
  BodySet:
    Body Humerus: mass=1 mass_center=(0 0 0) inertia=(0.083433 0.0002 0.083433 0 0 0)
      PhysicalOffsetFrame Humerus_geom_frame_0: socket_parent=.. translation=(0 0.5 0)
        Cylinder Humerus_cylinder_geom_0: scale_factors=(1 1 1) radius=0.02 half_height=0.5
      WrapViaEllipse Ell1_M_flexor: xyz_body_rotation=(0.785398 0 1.570796) translation=(0.1 0.1 0.15)
          semi_axis_length_H=0.025 semi_axis_length_G=0.05
    Body Ulna: mass=1 mass_center=(0 0 0) inertia=(0.083433 0.0002 0.083433 0 0 0)
      PhysicalOffsetFrame Ulna_geom_frame_0: socket_parent=.. translation=(0 0.5 0)
        Cylinder Ulna_cylinder_geom_0: scale_factors=(1 1 1) radius=0.02 half_height=0.5
      WrapViaEllipse Ell2_M_flexor: xyz_body_rotation=(0.875264 0.030158 1.398863) translation=(0.1 0.8 0.05)
          semi_axis_length_H=0.02 semi_axis_length_G=0.01
  JointSet:
    CustomJoint Joint_world->Humerus: socket_parent_frame=world_Joint_Humerus socket_child_frame=Humerus_Joint_world
      Coordinate Joint_world->Humerus_coord_0: default_value=0
      PhysicalOffsetFrame Humerus_Joint_world: socket_parent=/bodyset/Humerus translation=(0 1 0)
      PhysicalOffsetFrame world_Joint_Humerus: socket_parent=/ground translation=(0 0 0)
      SpatialTransform: axes_held_at_zero=(rotation2 rotation3 translation1 translation2 translation3)
        TransformAxis rotation1: coordinates=Joint_world->Humerus_coord_0 axis=(0 0 1) LinearFunction(coefficients=1 0)
    CustomJoint Joint_Humerus->Ulna: socket_parent_frame=Humerus_Joint_Ulna socket_child_frame=Ulna_Joint_Humerus
      Coordinate Joint_Humerus->Ulna_coord_0: default_value=0
      PhysicalOffsetFrame Ulna_Joint_Humerus: socket_parent=/bodyset/Ulna translation=(0 1 0)
      PhysicalOffsetFrame Humerus_Joint_Ulna: socket_parent=/bodyset/Humerus translation=(0 0 0)
      SpatialTransform: axes_held_at_zero=(rotation2 rotation3 translation1 translation2 translation3)
        TransformAxis rotation1: coordinates=Joint_Humerus->Ulna_coord_0 axis=(0 0 1) LinearFunction(coefficients=1 0)
  ForceSet:
    Millard2012EquilibriumMuscle M_flexor: max_isometric_force=0.1 optimal_fiber_length=0.2 tendon_slack_length=0.3
        pennation_angle_at_optimal=0 [radians]
      PathPoint O_M_flexor: Humerus (0 0.8 0)
      PathPoint I_M_flexor: Ulna (0 0.7 0)
      PathWrap Ell1_M_flexor: wrap_object=Ell1_M_flexor
      PathWrap Ell2_M_flexor: wrap_object=Ell2_M_flexor
